# Лаб. работа #2, Вариант 9.
# 424-1, Бадулин Илья, Ушаков Максим.
#
# Задача 1 «Проверка статистических гипотез»
#
# Крупный коммерческий банк заказал маркетинговое исследование по выявлению эффекта «премирования» (калькулятор, набор ручек и др.) как стимула для открытия счета в банке. Для проверки случайным образом было отобрано 200 «премированных» посетителей и 200 «не премированных». В результате выяснилось, что 79 % посетителей, которым не предлагалась премия, и 89 % посетителей, которым премия предлагалась, открыли счет в банке в течение 6 мес. Используя эти данные, проверьте гипотезу о том, что доля «премированных» посетителей, открывших счет в банке, существенно отличается от удельного веса «не премированных», открывших счет. Уровень значимости α = 0.05.
f(x) := 2*x^2
g(x) := d/dx(f(x))
g(x) → 4*x
# Решение
#
# H0 -- p1​ == p2​ (доли открывших счёт одинаковы).
# H1 -- p1​ != p2​ (доли различаются).
#
# Выберем гипотезу о генеральной доле.
α := 0.05
n1 := 200
n2 := 200
p1 := 0.89
p2 := 0.79
m1 := n1*p1
m2 := n2*p2
p := (m1 + m2)/(n1 + n2)
K := (p1 - p2)/sqrt(p*(1 - p))*sqrt(n1*n2/(n1 + n2))
K = 2.72772
# Φ(K крит) = (1 - α) / 2 = 0.45 --> К крит = 1.96
#
# Форма K крит - двусторонняя альтернатива, тк H1​ -- p1​!=p2​
# Область допустимых значений имеет вид (-1.96; 1.96)
#
# Наблюдаемое значение K = 2.728 не попадает в этот интервал, т.е. на данном уровне значимости основная гипотеза отвергается в пользу альтернативной.
#
# Ответ:
# Доля посетителей, открывших счёт, в группе, получившей премию (89%), статистически значимо отличается от доли в группе без премии (79%). Таким образом, премирование оказывает существенное влияние на решение об открытии счёта.
