# Лаб. работа #5, Вариант 9.
#
# 424-1, Бадулин Илья, Ушаков Максим.
# Часть 1 – Измерение корреляции несгруппированных данных
ORIGIN := 1
X := [0.04285; 0.8227; 1.428; 2.223; 5.301; 5.767; 6.016; 6.915; 7.279; 8.111; 8.551; 8.946; 9.315; 9.4; 9.54]
Y := [0.7698; 5.232; 5.244; 10.59; 17.88; 21.68; 20.16; 25.19; 23.83; 26.48; 30.05; 34.79; 35.06; 33.9; 34.8]
Rx := Rank(X) = [1; 2; 3; 4; 5; 6; 7; 8; 9; 10; 11; 12; 13; 14; 15]
Ry := Rank(Y) = [1; 2; 3; 4; 5; 7; 6; 9; 8; 10; 11; 13; 15; 12; 14]
n := length(X) = 15
# Расчет коэффициента Спирмена
rs := 1 - 6*sum((Rx[i] - Ry[i])^2, i = 1 .. n)/(n^3 - n) = 0.975
rs_check := Spear(X, Y) = [14; -3.64812; 0.000264171; 0.975; 7.14371e-10]
# Проверка значимости коэффициента Спирмена
# H_0:
# H_1:
# ДОДЕЛАТЬ
alfa := 0.01
K_nabl_S := rs*sqrt(n - 2)/sqrt(1 - rs^2) = 15.8206
K_tabl := qt(1 - alfa, n - 2) = 2.65031
# Вывол:
# K_nabl_S > K_tabl --> гипотеза об отсутствии связи отвергается — между переменными есть значимая монотонная связь.
# Расчет коэффициента Пирсона
rxy := (sum(X[i]*Y[i], i = 1 .. n) - n*mean(X)*mean(Y))/(sqrt(sum(X[i]^2, i = 1 .. n) - n*mean(X)^2)*sqrt(sum(Y[i]^2, i = 1 .. n) - n*mean(Y)^2)) = 0.990405
rxy_check := corr(X, Y) = 0.990405
# Проверка значимости коэффициента Пирсона
# H_0:
# H_1:
# ДОДЕЛАТЬ
alfa := 0.01
K_nabl_P := rxy*sqrt(n - 2)/sqrt(1 - rxy^2) = 25.8403
# Вывол:
# K_nabl_P > K_tabl --> есть наличие линейной положительной корреляционной зависимости между X и Y.
# Сила связи = 0.99 -- весьма тесная.
# Сравнение коэффициентов
# ДОДЕЛАТЬ
rs = 0.975
rxy = 0.990405
# Часть 2 – Исследование корреляции сгруппированных данных
x := [12; 16; 20; 24; 28]
y := [7; 11; 15; 19; 23; 27]
nxy := [0, 0, 0, 0, 7, 8; 0, 0, 4, 11, 6, 0; 0, 0, 12, 26, 9, 0; 0, 3, 8, 0, 0, 0; 2, 4, 0, 0, 0, 0]
m := 5
k := 6
i := 1 .. m
j := 1 .. k
# Суммы по строкам | Суммы по столбцам | Общий объем выборки
nx[i] := sum(nxy[i, j], j = 1 .. k)
n := sum(nx[i], i = 1 .. m) = 100
ny[j] := sum(nxy[i, j], i = 1 .. m)
nx = [15; 21; 47; 11; 6]
ny = [2; 7; 24; 37; 22; 8]
# Вычисляем общие средние
xsr := sum(x[i]*nx[i], i = 1 .. m)/n = 18.88
ysr := sum(y[j]*ny[j], j = 1 .. k)/n = 18.76
# Вычисляем групповые средние Y по X
ysr_i[i] := sum(y[j]*nxy[i, j], j = 1 .. k)/nx[i]
ysr_i = [25.1333; 19.381; 18.7447; 13.9091; 9.66667]
Xdot := [12; 12; 16; 16; 16; 20; 20; 20; 24; 24; 28; 28]
Ydot := [23; 27; 15; 19; 23; 15; 19; 23; 11; 15; 7; 11]
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